# Киселёва А.Н.
# Губанов В.
# группа 211-324  Вариант 10-4
# Изучение кинематической схемы и нумерация валов
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# Закрытая передача - редуктор цилиндрический одноступенчатый вертикальный(прямозубый)
#
# Открытая передача - цепная, приводной роликовой цепью
#
# Исходные данные
# -Тяговое усилие на ленте  F := 6кН
# -Скорость движения ленты - V := 0.9м/c
# -Диаметр звездочки D := 0.4м
# -Нагрузка - постоянная
# -Вид передач - не реверсивные
# -Срок службы привода - 10 лет при работе в одну смену
# -Срок службы подшипников = 20 000 часов
# Кинематический расчет
# Выбор электродвигателя
# Общий КПД привода η_Σ = произведению частных КПД:
η_з.п. := 0.97  # КПД закрытой передачи (цилиндрического редуктора)
η_о.п. := 0.91  # КПД открытой передачи (цепной)
η_м := 1  # КПД муфты
η_п.п := 0.99  # КПД одной пары подшибгтков качения
η_Σ := η_з.п.*η_о.п.*η_м*η_п.п^3 = 0.856483
# Требуемая мощность электродвигателя:
# Ρ_р.в. := F*V = 5.4кВт
# P_эд_тр := Ρ_р.в./η_Σ = 6.30485(кВт)
# где Ρ.р.в. - мощность на валу рабочего органа привода, кВт
# Требуемая частота вращения вала электродвигателя:
# ω_р.в. := 2*V/D = 4.5(c^-1)
# u[Σ]^рек - возможное среднее рекомендуемое передаточное число привода:
u_з.п.рек := 4
u_о.п.рек := 3
u_Σрек := u_з.п.рек*u_о.п.рек = 12
η_эд(тр) := (30*ω_р.в.*u_Σрек/π) = 515.662
# В соответствии с требуемой мощностью электродвигателя  - P[зд]^тр и требуемой частотой вращения вала - n[зд]^трэлектродвигателя выбираем по таблице электродвигатель АИР132S8
# АИР160S8
# Исполнение - IM1081
# Мощность - 7.5 кВт
# Частота вращения - 727 об/мин
# T[max]/T[min]=2.2
# Диаметр вала - d_эд := 48мм
# Определение общего передаточного числа U[Σ] привода и разбивка его между отдельными ступенями
# При известных характеристиках электродвигателя общее передаточное число:
n_з.д. := 727  # ω_з.д. := π*n_з.д./30 = 76.1313(рад/c)
U_Σ := ω_з.д./ω_р.в. = 16.9181
# Также:
# Делаем вывод:
#
# Передаточное число закрытой передачи
#
# u_з.п. := U_Σ/u_о.п.рек = 5.63935
# U_Σ= U_з.п.*U_о.п.
u_з.п. := 5.6
# Передаточное число открытой передачи
u_о.п. := U_Σ/u_з.п. = 3.02108
# Определение угловых скоростей валов привода
# Угловая скорость первого вала - ω_1 := ω_з.д. = 76.1313(рад/c)
# Угловая скорость второго вала - ω_2 := ω_1/u_з.п. = 13.5949(рад/c)
# Угловая скорость третьего вала - ω_3 := ω_2/u_о.п. = 4.5(рад/c) = ω_р.в.
# Определение частот вращения валов
n_1 := n_з.д. = 727  # (об/мин)
n_2 := 30*ω_2/π = 129.821  # (об/мин)
n_3 := 30*ω_3/π = 42.9718  # (об/мин)
# Определение мощностей на валах привода
P_1 := P_эд_тр = 6.30485
P_2 := P_1*η_з.п.*η_п.п = 6.05455
P_3 := P_2*η_о.п.*η_п.п = 5.45455
Ρ_р.в. = 5.4
# Определение вращающих моментов на валах привода  (кН*м)
T_1 := P_1/ω_1 = 0.0828156
T_3 := F*D/2 = 1.2
T_2 := P_2/ω_2 = 0.445356
P_3/ω_3 = 1.21212
# Анализ результатов кинематического расчета привода
# ω_1 = ω_зд  ω_1 ≥ ω_2 ≥ ω_3  ω_посл.вала = ω_р.в.
# η_1 = η_з.д.  η_1 ≥ η_2 ≥ η_3
# P_1 = P_зд_тр P_1 ≥ P_2 ≥ P_3  P_посл.вала = P_р.в.
# T_2 ≤ T_3  T_посл.вала = T_р.в.
# Расчет закрытой передачи
# Вращающий момент :
#
# T_1 := T_1*10^6 = 82815.6 Н*мм
#
# T_2 := T_2*10^6 = 445356 Н*мм
# Угловая скорость:
#
# ω_1 = 76.1313Н*мм
#
# ω_2 = 13.5949Н*мм
# Частота вращения:
#
# n_1 = 727об/мин
# n_2 = 129.821об/мин
# Передаточное число:
#
# u_12 := n_1/n_2 = 5.6
# Выбор материала зубчатых колес, назначение упрочняющей обработки и определение допускаемых напряжений
# Определяем размеры заготовок:
c := 1  # Н/мм^2
# d_1_загот. := 3.0*nthroot(T_2/(1*u_12^2), 3) = 72.6493(мм)
# d_2_загот. := d_1_загот.*u_12 = 406.836(мм)
# Материал колеса: сталь 45Л, литье, термообработка - нормализация, диаметр заготовки: свыше 300 мм
#
# Твердость HB_2 := 180
# Предел прочности σ_B2 := 520(МПа)
# Предел текучести σ_T2 := 290(МПа)
# Допускаемое контактное напряжение для зубчатого колеса
#
# σ_H2 := (2*HB_2 + 70)/1.2 = 358.333(МПа)
# Допускаемое напряжение изгиба для зубчатого колеса
#
# σ_F2 := 1.8*HB_2 = 324
HB_1 := HB_2*nthroot(u_12, 6) = 239.867
# Материал: Сталь 40, прокат,
# σ_в := 780
# σ_т := 780
# HB_1 := 220
# Термообработка - улучшение
# Допускаемое контактное напряжение для зубчатого колеса
#
# σ_H1 := (2*HB_1 + 70)/1.2*1 = 425
# Допускаемое напряжение изгиба для зубчатого колеса
# σ_F1 := 1.8*HB_1/1.8*1^2 = 220
σ_H := (σ_H1 + σ_H2)/2 = 391.667
σ_H2*1.25 = 447.917
# Коэффициент нагрузки K_H := 1.1
# Коэффициент ширины колеса по межосевому расстоянию
#
# Ψ_ba := 0.315
C := 310
# a_ω := (u_12 + 1)*nthroot((C/(σ_H*u_12))^2*T_2*K_H/Ψ_ba, 3) = 207.481
#
# a_ω := 224
# Нормальный модуль зацепления
#
# m_n := 0.01*a_ω = 2.24округлим до 1.25
#
# m_n := 1.25
cosB := 1
B := 0 deg
# Суммарное число зубьев  шестерни и колеса
Z_c := 2*a_ω/m_n = 358.4
Z_1 := Z_c/(u_12 + 1) = 54.303
Z_1 := round(Z_1) = 54
Z_2 := Z_c - Z_1 = 304.4
Z_2 := round(Z_2) = 304
u := Z_2/Z_1 = 5.62963
# Расхождение
#
# U_dif := abs((u - u_12)/u)*100 = 0.526316%
d_1 := m_n*Z_1/cosB = 67.5
d_1 := 68
d_2 := m_n*Z_2/cosB = 380
# Проверка
#
# a_w := (d_2 + d_1)/2 = 224
# Диаметры окружностей и выступов
# Диаметры окружностей впадин
#
# d_f1 := d_1 - 2.5*m_n = 64.875
#
# d_f2 := d_2 - 2.5*m_n = 376.875
d_a1 := d_1 + 2*m_n = 70.5
d_a2 := d_2 + 2*m_n = 382.5
# Определим ширину зубчатых колес
#
# b_2 := Ψ_ba*a_ω = 70.56
#
# b_1 := b_2 + 5 = 75.56
b_2 := 70
b_1 := 75
# Проверочный расчёт
ψ_bd := b_2/d_1 = 1.02941
V := ω_1*d_1/(2*1000) = 2.58846  # - 8 степеней точности
K_Hb := 1.09
K_Ha := 1.04
K_Hv := 1.05
K_H := K_Ha*K_Hb*K_Hv = 1.19028
# Проверим условие прочности
σ_Hch := C/(a_w*u)*sqrt(T_2*K_H/b_2*(u + 1)^3) = 365.171
koef_ch := abs(σ_H - σ_Hch)/σ_Hch*100 = 7.25556
# <10%
#
# Условие выполнено
Z_v1 := Z_1/cosB^3 = 54
Z_v2 := Z_2/cosB^3 = 304
Y_F1 := 3.66
Y_F2 := 3.6
σ_F1/Y_F1 = 60.1093  # <
σ_F2/Y_F2 = 90
K_Fa := 1
K_Fb := 1.1
K_V := 1.45
# Определим коэффициент нагрузки
K_F := K_Fa*K_Fb*K_V = 1.595
σ_F := 2*T_1*K_F/(Z_1*b_1*m_n^2)*Y_F1 = 152.795  # МПа
# σ_F<σ_F2
σ_F2 = 324
d_1 = 68
# Определяем окружные силы
α := 20 deg
F_t2 := 2*T_1/d_1 = 2435.75
F_t1 := F_t2
# Определяем радиальные силы
F_r1 := F_t1*tan(α) = 886.541
F_r2 := F_r1
# Определим силы нормального давления
F_n1 := F_t1/cos(α) = 2592.07
F_n2 := F_n1
# Расчет открытой передачи
# Исходные данные
# T на меньшей звездочке | T на большей звездочке
T_1о := T_2 = 445356
T_2о := T_3*10^6 = 1200000
# Частота вращения ведущей звездочки | Частота вращения ведомой звездочки
n_1о := n_2 = 129.821
n_2о := n_3 = 42.9718
# Мощность на ведущей звездочке | Мощность на ведомой звездочке
P_1о := P_2*1000 = 6054.55
P_2о := P_3*1000 = 5454.55
# Передаточное число открытой цепной передачи
u_12 := u = 5.62963
Z_1о := 31 - 2*u_12 = 19.7407
Z_1о := floor(Z_1о) = 19
Z_2о := Z_1о*u_12 = 106.963
Z_2о := floor(Z_2о) = 106
uu_12 := Z_2о/Z_1о = 5.57895
delta_u := abs(u_12 - uu_12)/u_12*100 = 0.900277  # <3%
p := 29
m := 1
K_f := 1
K_д := 1.25
K_н := 1
K_п := 1.25
K_см := 1.4
K_p := 1.25
K_а := 1
K_э := K_д*K_а*K_н*K_p*K_см*K_п = 2.73438
t := 2.8*nthroot(T_1о*K_э/(Z_1о*p*m), 3) = 36.4722
# Выбор цепи роликовой однорядной
t := 38.10
d_1_1 := 22.23
F_p := 124587
B_BH := 25.4
h := 36.2
q := 5.5
d := 11.1
b := 58
S := 394
# Проверим условие обеспечения износостойкости цепи
# При шаге цепи t = 38.1мм  -> n_1brack := 500
n_1brack > n_1о = 1
V := (Z_1о*n_1о*t)/60000 = 1.5663
F_t := P_1о/V = 3865.52
p_p := F_t*K_э/S = 26.8269
α := 40*t = 1524
L_t := 2*α/t + (Z_1о + Z_2о)/2 + ((Z_2о - Z_1о)/(2*π))^2*t/α = 147.293
L_t := 148
α_dif := t/4*(L_t - (Z_1о + Z_2о)/2 + sqrt((L_t - (Z_1о + Z_2о)/2)^2 - 8*((Z_2о - Z_1о)/(2*π))^2)) = 1538.32
α_dif_2 := 0.997*α_dif = 1533.7
a'' := 1521
d_11 := t/sin(180 deg/Z_1о) = 231.478
d_22 := t/sin(180 deg/Z_2о) = 1285.71
lambda_1 := t/d_1_1 = 1.7139
lambda_2 := lambda_1
K := 0.575
D_e1 := t*(K + cot((180 deg)/Z_1о)) = 250.228
D_e2 := t*(K + cot((180 deg)/Z_2о)) = 1307.06
# Проверка коэффициента запаса прочности
s := F_p/(F_t*K_д*q*V^2 + (9.81*K_f*q*α_dif_2)/1000) = 1.90851
n_1о = 129.821
s_table := 9.8
s > s_table = 0
# Определение силы, действующие на валы
K_B := 1.1
F_B := F_t*K_B = 4252.08
# Расчет и конструирование валов
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# На схеме видно, вал 1 - быстроходный; вал 2 - тихоходный
# Быстроходный вал
T_б := 0.083*1000000 = 83000
d_б := nthroot(T_б/(0.2*25), 3) = 25.5095
# АИР160S8
# Исполнение - IM1081
# Мощность - 7.5 кВт
# Частота вращения - 727 об/мин
# T[max]/T[min]=2.2
# Диаметр вала - d_эд := 48мм
d_эд = 48
0.8*d_эд = 38.4
# Ближайшее значение по таблице:
#
# d_б := 40  L_б := 82
# Диаметр под подшипник d_б. d_п := d_б + 5 = 45мм
# Диаметр заплечика примем d_з := d_п + 10 = 55мм
# Зацепление через шпонку, шестерня отдельная деталь d_f1 = 64.875мм
d_f1 := round(d_f1) = 65
l_СБ := b_1 = 75
# Подшипники ГОСТ 8338-75 309
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D_Б := 100
d_БП := 45
B_П1 := 25
r_П1 := 2.5
(D_Б - d_БП)/2 = 27.5
r_Б := 0.4*(D_Б - d_БП) = 22
# Длина участка под правым подшипником
l_П1 := B_П1 + 0 = 25
# Рисунок 4 - Конструкция подшипника
# Тихоходный вал
T_т := 0.445*1000000 = 445000
d_т := nthroot(T_т/(0.2*15), 3) = 52.9354
# Примем d_т := 53 мм  l_т := 82мм
d_п := 60  # мм
d_с := 65  # мм
d_уб := 75  # мм
l_с := b_2 = 70
# Подшипник ГОСТ 8338-75 312
D_T := 130
d_ТП := 60
B_П2 := 31
r_П2 := 3.5
(D_T - d_ТП)/2 = 35
r_T := 0.4*(D_T - d_ТП) = 28
# Длина участка вала под ступицу
l_C := b_2 = 70
# Длина участка вала под подшипник
l_П2 := B_П2 + 1 = 32
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# Рисунок 5 - Схема компоновки
# Выбор подшипников в КОМПАС-3D
# Для быстроходного вала
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# Для тихоходного вала
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# Расчет зубчатого колеса
# Параметры | Значения
d_ст := 1.6*d_с = 104
l_ст := 1.3*d_с = 84.5
δ_0 := 3*m_n = 3.75
δ_0 := 8
C := 0.3*b_2 = 21
b_2 = 70
n := 0.5*m_n = 0.625
D_0 := d_a2 - (d_a2 - d_f2)*2 - δ_0*2 - n*2 = 354
D_отв := 0.5*(D_0 + d_ст) = 229
d_отв := (D_0 - d_ст)/4 = 62.5
s_колеса := 0.8*C = 16.8
h_колеса := (l_ст - C)/2 = 31.75
r := h_колеса*0.05 + 1 = 2.5875
R := 2.5*r + 1 = 7.46875
# Выбор шпонок
# Шпонка для зубчатого колеса, соединение с зубчатым колесом
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# Шпонка для шестерни, соединение с шестерней
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# Корпус редуктора
# Диаметр фундаментальных болтов
# Толщина стенки редуктора
δ := 10
d_Б1 := 20
l_шТ1 := 70
# Диаметр болтов у подшипников
d_Б2 := 16
# Диаметр болтов на фланце корпуса | Диаметр штифтов
d_Б3 := 12
d_штифт := d_Б3 = 12
# Длина подшипниковых гнезд: | Окружная скорость
L_гнезда := δ + 37 + 3 = 50
V = 1.5663
2.569 < 3 = 1
# Крышки торцевые(накладные)
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# Рисунок 7 - Конструкция торцевых (накладных) крышек
# Крышки быстроходного вала
D_Б := 100
D_БК1 := D_Б + 25 = 125
D_БК2 := D_Б + 50 = 150
D_БК3 := D_Б - 15 = 85
d_БК := 11
d_БК1 := 22
M_1 := 10
n_K1 := 6
H_K1 := 15
h_1
# - от  5 до 30
S_K1 := 7
# Крышки для тихоходного вала
D_T = 130
D_TK1 := D_T + 25 = 155
D_TK2 := D_T + 50 = 180
D_TK3 := D_T - 15 = 115
d_TK := 11
d_TK1 := 22
M_2 := 10
n_K2 := 6
H_K2 := 15
h2
# - от 5 до 30
S_K2 := 7
M_x := 445000
M_y := 15500
M_k2 := 445000
T_T := 4.45*10^5
M_экв := sqrt(M_x^2 + M_y^2 + M_k2^2) = 629516
d_пров := nthroot(M_экв/(0.1*60), 3) = 47.1649
d_с.т. := 65
δ := (d_с.т. - d_пров)/d_с.т.*100 = 27.4387
|δ| = 27.4387
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# По рассчетам был получен диаметр d_пров = 47.1649 меньше d_с.т. = 65, что удовлетворяет условию.
# По рассчетам в инвенторе максимальное напряжение - 31 в 6.77 раз меньше максимального допустимого напряжения для стали - 210.
