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D := 0.4
[m]
# 1 - быстроходный
# 2 - тихоходный
# 3 - рабочий
F := 6
[kH]
V := 0.9
[km/hr]
# Нагрузка: Постоянная
# Вид передачи: Не реверсивное
# Срок службы привода: 10 лет при работе в одну смену
# Срок службы подшипников: 20 000 часов
# Группа: -
# Выбор электродвигателя
# Мощность на валу рабочего органа привода
P_р.в. := F*V = 5.4
# Требуемая частота вращения вала
η_з.п. := 0.97  # КПД закрытой передачи(цилиндрического редуктора)
η_о.п. := 0.91  # КПД открытой передачи(цепной)
η_м := 1  # КПД муфты
η_п.п. := 0.99  # КПД одной пары подшипников качения
η_Σ := η_з.п.*η_о.п.*η_м*η_п.п.^3 = 0.856483
# Требуемая мощность электродвигателя:
P_тр_зд := P_р.в./η_Σ = 6.30485
# Угловая скорость рабочего вала
w_р.в. := (2*V)/D = 4.5
u_з.п. := 4
u_о.п. := 3
# Возможное среднее рекомендуемое передаточное число привода
u_Σ := 4*3 = 12
# Требуемая частота вращения вала электродвигателя
η_эд := (30*w_р.в.*u_Σ)/π = 515.662
# Частота вращения вала и мощность электродвигателя по таблице:
η_эд := 727
P_зд := 7.5
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# Таблица 1 - Тип двигателя
# Определение общего передаточного числа привода и разбивка его между отдельными ступенями
# Угловая скорость вала электродвигателя
w_эд := (π*η_эд)/30 = 76.1313
# Общее передаточное число привода
u_Σ := w_эд/w_р.в. = 16.9181
# Передаточное число закрытой передачи
u_з.п. := u_Σ/u_о.п. = 5.63935
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u_з.п. := 5.6  # Округленное передаточное число закрытой передачи:
u_о.п. := u_Σ/u_з.п. = 3.02108  # Передаточное число открытой передачи
u_о.п. > 2 = 1
u_о.п. < 6 = 1
# Угловые скорости валов
w_1 := w_эд = 76.1313  # (рад/с)  # (1.12)
w_2 := w_1 = 76.1313  # (рад/с)  # (1.13)
w_3 := w_2/u_з.п. = 13.5949  # Угловая скорость тихоходного вала (1.13)
w_4 := w_3/u_о.п. = 4.5  # Угловая скорость быстроходного вала (1.13)
# Угловая скорость рабочего вала
w_р.в. := w_4 = 4.5  # т.к. вал редуктора и вал ленточного конвейера соединены муфтой
# Частоты вращения валов
η_1 := 727
η_2 := η_1 = 727
η_3 := (30*w_3)/π = 129.821
η_4 := (30*w_4)/π = 42.9718
# Мощности на валах
P_1 := P_тр_зд = 6.30485
P_2 := P_1*η_п.п. = 6.24181
P_3 := P_2*η_п.п.*η_з.п. = 5.99401
P_4 := P_3*η_п.п.*η_о.п. = 5.4
P_р.в. = 5.4
# Вращающие моменты валов
T_1 := P_1/w_1 = 0.0828156
T_2 := P_2/w_2 = 0.0819874
T_3 := P_3/w_3 = 0.440902
T_4 := P_4/w_4 = 1.2
# Момент на валу рабочего органапривода
T_р.в. := (F*D)/2 = 1.2
# Анализ:
w_3 = 13.5949
w_р.в. == w_4 = 1
w_4 = 4.5
w_1 == w_эд == w_2 = 1
η_4 = 42.9718
η_3 = 129.821
η_1 == η_2 == η_эд = 1
P_р.в. = 5.4
P_1 = 6.30485
P_2 = 6.24181
P_3 = 5.99401
P_4 = 5.4
T_1 = 0.0828156
T_2 = 0.0819874
T_3 = 0.440902
T_4 = 1.2
T_р.в. = 1.2
# Вращающий момент:
T_1 := T_2*10^6 = 81987.4
T_2 := T_3*10^6 = 440902
# Угловая скорость
w_1 := w_2 = 76.1313
w_2 := w_3 = 13.5949
# Частота вращения
η_1 := η_2 = 727
η_2 := η_3 = 129.821
# Передаточное число:
u_12 := w_1/w_2 = 5.6
η_1/η_2 = 5.6
u_з.п. = 5.6
u := u_12 = 5.6
# Размеры заготовок
d_1загот := 3*nthroot(T_2/(1*u^2), 3) = 72.4063
d_2загот := d_1загот*u = 405.476
# Материалы шестерни. Сталь 45Л. Литье. Термообработка - нормализация. Диаметр заготовки свыше 300 мм.
# Твердость
HB_2 := 180
# Предел прочности
σ_B2 := 520
# Предел текучести
σ_T2 := 290
σ_Flimb2 := 1.8*HB_2 = 324
σ_Hlimb2 := 2*HB_2 + 70 = 430
# Допускаемое контактное напряжение для шестерни
σ_H2 := (σ_Hlimb2*1)/1.2 = 358.333
# Допускаемое напряжение изгиба для шестерни
σ_F2 := (σ_Flimb2*1*1)/1.8 = 180
# Твердость материала шестерни
HB_1 := HB_2*nthroot(u, 6) = 239.867
# Материал колеса - Сталь 40. Прокат. Термообработка - улучшение.
# Диаметр заготовки до 90мм.
# Твердость
HB_1 := 220
# Предел прочности
σ_B1 := 780
# Предел текучести
σ_T1 := 630
# Допускаемое контактное напряжение для шестерни
σ_Hlimb1 := 2*HB_1 + 70 = 510
σ_H1 := (σ_Hlimb1*1)/1.2 = 425
# Допускаемое напряжение изгиба для шестерни
σ_Flimb1 := 1.8*HB_1 = 396
σ_F1 := (σ_Flimb1*1*1)/1.8 = 220
# Расчетное контактное напряжение
σ_H := σ_H2 = 358.333
# Определение параметров зацепления
K_H := 1.1
# Коэффициент ширины колеса по межосевому расстоянию
T_2 = 440902
C := 310
ψ_baw := 0.315
a_w := (u + 1)*nthroot((C/(σ_H*u))^2*(T_2*K_H)/ψ_baw, 3) = 219.42
# Межосевое расстояния
a_w := 224
# Модуль зацепления:
m_n := 0.01*a_w = 2.24
m_n := 1.25
# Суммарное число зубьев прямозубых шестерни и колеса
z_c := (2*a_w)/m_n = 358.4
z_c := 358
# Число зубьев для зубчатого колеса:
z_1 := z_c/(u + 1) = 54.2424
z_1 := 54
# Число зубьев для зубчатого колеса
z_2 := z_c - z_1 = 304
# Уточняем передаточное число:
u_проб := z_2/z_1 = 5.62963
Δu := (u - u_проб)/u*100*(-1) = 0.529101
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# Рисунок 2 - Обозначение геометрических размеров передачи
# Диаметры делительных окружностей (2.24):
d_1 := m_n*z_1 = 67.5
d_2 := m_n*z_2 = 380
# Диаметры окружностей впадин:
d_f1 := d_1 - 2.5*m_n = 64.375
d_f2 := d_2 - 2.5*m_n = 376.875
# Ширина зубчатых колес:
b_2 := a_w*ψ_baw = 70.56
b_1 := b_2 + 5 = 75.56
# Проверочный расчет передачи
# Коэффициент ширины относительно диаметра
ψ_bd := b_2/b_1 = 0.933827
# Проверка условия прочности по контактным напряжениям:
V := (w_1*d_1)/(2*1000) = 2.56943  # Степень точности - 8
# Коэффициент нагрузки:
K_Hш := 1.09*1.04*1.05 = 1.19028
# Проверка условия прочности:
σ_H = 358.333
σ_Hш := C/(a_w*u_проб)*sqrt((T_2*K_Hш)/b_2*(u_проб + 1)^3) = 361.896
Δ := (σ_H - σ_Hш)/σ_H*100 = -0.994311
# Проверка условия прочности зубьев по напряжениям:
# Коэффициент формы зуба
Y_F1 := 3.66
Y_F2 := 3.6
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σ_F1/Y_F1 = 60.1093
σ_F2/Y_F2 = 50
# Коэффициент нагрузки:
K_F := 1*1.1*1.45 = 1.595
# Проверка условия прочности:
σ_F := (2*T_1*K_F)/(z_1*b_1*m_n^2)*Y_F1 = 150.146
σ_F2 = 180
# Определение сил действующих в зацеплении:
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# Окружные силы
F_t2 := 2*T_1/d_1 = 2429.26
F_t1 := F_t2 = 2429.26
# Радиальные силы
F_r1 := F_t1*tan(20°) = 884.177
F_r2 := F_r1 = 884.177
# Силы нормального давления
F_n1 := F_t1/cos(20°) = 2585.16
F_n2 := F_n1 = 2585.16
# Расчет открытых передач
# Вращающий момент
T_1 := T_3*10^6 = 440902
T_2 := T_4*10^6 = 1200000
# Частота вращения
η_1 := η_3 = 129.821
η_2 := η_4 = 42.9718
# Мощность
P_1 := P_3*1000 = 5994.01
P_2 := P_4*1000 = 5400
# Передаточное число открытой передачи
u_12 := u_о.п. = 3.02108
u := u_о.п. = 3.02108
# Определение числа зубьев звездочек
# Ведущая (меньшая):
z_1 := 31 - 2*u = 24.9578
z_1 := z_1*0.85 = 21.2142
# Ведомая (большая):
z_2 := z_1*u = 64.0897
z_1 := 22
z_2 := 64
# Уточнение придаточного отношения:
u_12' := z_2/z_1 = 2.90909
del := (u_12 - u_12')/u_12*100 = 3.70698
# Вычисление шага цепи
# Коэффициент эксплуатации
K_э := 1.25*1*1.25*1.25*1.4*1 = 2.73438
k_z := 1 + 0.01*(z_1 - 17) = 1.05
# Ориентировочное допускаемое среднее давление в шарнирах цепи
p := 23*k_z = 24.15
# Число рядов цепи
m := 1
# Шаг цепи:
t := 2.8*nthroot((T_1*K_э)/(z_1*p*m), 3) = 36.7941
t := 38.10
# Расстояние между внутренними пластинами:
B_BH := 25.4
# Диаметр валика
d := 11.1
# 78 ролика
d_1' := 22.23
# Ширина пластины
h := 36.2
# Длина валика
b := 58
# Разрушающая нагрузка:
F_p := 124587
# Масса 1 м цепи:
q := 5.5
# Проекция опорной поверхности цилиндра:
S := 394
# Проверка условия обеспечения износостойкости цепи:
# Частота вращения ведущей звездочки:
η_1 = 129.821
η_1' := 500
# Скорость цепи:
V' := (z_1*η_1*t)/60000 = 1.81361
# Окружная сила:
F_t := P_1/V' = 3305.02
# Среднее давление в шарнирах цепи:
p_1 := (F_t*K_э)/S = 22.937
p := 19*k_z = 19.95
Δp := (p_1 - p)/p*100 = 14.9723
# Определение геометрических параметров передачи
a := 40*t = 1524
# Число звеньев цепи:
L_t := (2*a)/t + (z_1 + z_2)/2 + ((z_2 - z_1)/(2*π))^2*t/a = 124.117
L_t' := 124
# Уточняем межосевое расстояние:
a' := t/4*(L_t' - (z_1 + z_2)/2 + sqrt((L_t' - (z_1 + z_2)/2)^2 - 8*((z_2 - z_1)/(2*π))^2)) = 1521.74
a'' := 0.997*a' = 1517.17
a'' := 1517
# Определяем делительные диаметры ведущей и ведомой звездочек:
d_1 := t/sin(180°/z_1) = 267.716
d_2 := t/sin(180°/z_2) = 776.479
# Определяем делительные диаметры ведущей и ведомой звездочек:
# Геометрическая характеристика зацепления
λ_1 := t/d_1' = 1.7139
# Коэффициент высоты зуба
K := 0.575
# Наружные диаметры ведущей и ведомой звездочек:
D_e1 := t*(K + cot(180°/z_1)) = 286.899
D_e2 := t*(K + cot(180°/z_2)) = 797.451
# Проверка коэффициента запаса прочности:
s := F_p/(F_t*1.25 + q*V'^2 + (9.81*1*q*a'')/1000) = 29.4447
s' := 9.8
# Определение силы, действующей на валы:
F_B := F_t*1.1 = 3635.52
# Расчет и конструирование быстроходного вала
T_Б := 8.199*10^4
d_Б := nthroot(T_Б/(0.2*25), 3) = 25.4056
d_Б := 40
l_Б := 82
r_Б := 2
c_Б := 1.6
# Размеры шпонок:
l_шБ1 := 70
b_Б1 := 12
h_Б1 := 8
t_1Б1 := 5
t_2Б1 := 3.3
s_Б := 0.3
l_шБ2 := 56
b_Б2 := 16
h_Б2 := 10
t_1Б2 := 6
t_2Б2 := 4.3
d_эд := 48
d' := d_эд*0.8 = 38.4
38.4 ≤ d_Б = 1
d_Б := 40
# Конструирование быстроходного вала
# Диаметр под подшипник | Диаметр заплечника
d_П1 := d_Б + 5 = 45
d_з1 := d_П1 + 10 = 55
# (зацепление через шпонку, шестерня отдельная деталь)
d_f1 = 64.375
d_f1 := round(d_f1) = 64
l_СБ := b_1 = 75.56
# Подшипники ГОСТ 8338-75 309
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D_Б := 100
d_БП := 45
B_П1 := 25
r_П1 := 2.5
(D_Б - d_БП)/2 = 27.5
r_Б := 0.4*(D_Б - d_БП) = 22
# Длина участка под правым подшипником
l_П1 := B_П1 + 0 = 25
# Рисунок 4 - Конструкция подшипника
# Расчет и конструирование тихоходного вала
T_T := T_1 = 440902
d_T := nthroot(T_T/(0.2*15), 3) = 52.7724
d_T := 53
l_Б := 82
r_T := 2.5
c_T := 2
# Размеры шпонок
l_шT1 := 70
b_T := 16
h_T := 10
t_1T := 6
t_2T := 4.3
s_T := 0.3
l_шT2 := 56
b_T := 18
h_T := 11
t_1T := 7
t_2T := 4.3
# Диаметр под подшипник | Диаметр под ступицу | Диаметр упорного буртика
d_П2 := d_T + 7 = 60
d_C1 := d_П2 + 5 = 65
d_УБ := d_C1 + 10 = 75
# Подшипник ГОСТ 8338-75 312
D_T := 130
d_ТП := 60
B_П2 := 31
r_П2 := 3.5
(D_T - d_ТП)/2 = 35
r_T := 0.4*(D_T - d_ТП) = 28
# Длина участка вала под ступицу
l_C := b_2 = 70.56
# Длина участка вала под подшипник
l_П2 := B_П2 + 1 = 32
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# Рисунок 5 - Схема компоновки
# Корпус редуктора
# Толщина стенки редуктора | Диаметр фундаментальных болтов
δ := 10
d_Б1 := 20
l_шТ1 := 70
# Диаметр болтов у подшипников | Диаметр болтов на фланце корпуса | Диаметр штифтов
d_Б2 := 16
d_Б3 := 12
d_штифт := d_Б3 = 12
# Длина подшипниковых гнезд: | Окружная скорость
L_гнезда := δ + 37 + 3 = 50
V = 2.56943
2.569 < 3 = 1
# Установка мазеудерживающих колец
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# Рисунок 6 - Конструкция мазеудерживающего кольца, подшипниковые узлы с использованием пластичного смазочного материала
# Крышки торцевые(накладные)
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# Рисунок 7 - Конструкция торцевых (накладных) крышек
# Крышки быстроходного вала
D_Б := 100
D_БК1 := D_Б + 25 = 125
D_БК2 := D_Б + 50 = 150
D_БК3 := D_Б - 15 = 85
d_БК := 11
d_БК1 := 22
M_1 := 10
n_K1 := 6
H_K1 := 15
h_1
# - от  5 до 30
S_K1 := 7
# Крышки для тихоходного вала
D_T = 130
D_TK1 := D_T + 25 = 155
D_TK2 := D_T + 50 = 180
D_TK3 := D_T - 15 = 115
d_TK := 11
d_TK1 := 22
M_2 := 10
n_K2 := 6
H_K2 := 15
h2
# - от 5 до 30
S_K2 := 7
